# Лабораторная работа 2 "Решение систем линейных алгебраических уравнений"
# Гордеев Никита, группа 22307, вариант 7
# ! Начальные данные
D := [
    1.342, 0.432, -0.599, 0.202;
    0.202, 1.342, 0.432, -0.599;
    -0.599, 0.202, 1.342, 0.432;
    0.432, -0.599, 0.202, 1.342
]  # матрица
C := [0.02, 0, 0, 0; 0, 0.02, 0, 0; 0, 0, 0.02, 0; 0, 0, 0, 0.02]  # матрица
b := [1.941; -0.230; -1.941; 0.230]  # вектор
# 1) Решение системы методом Гаусса
A := D + 7*C = [
    1.482, 0.432, -0.599, 0.202;
    0.202, 1.482, 0.432, -0.599;
    -0.599, 0.202, 1.482, 0.432;
    0.432, -0.599, 0.202, 1.482
]  # матрица
x := lsolve(A, b) = [0.933537; -0.00734579; -0.933537; 0.00734579]  # вектор-столбец решений системы линейных алгебраических уравнений
# 2) Приближённое решение системы итерационным методом
# метод простых итераций
m := 210
# число итераций
i := 0 .. m  # номер итерации
y[0] := b
# вектор
τ := 0.25  # точность
y[i + 1] := y[i] + τ*(b - A*y[i])  # итерационная формула
y[m + 1] = [0.933537; -0.00734579; -0.933537; 0.00734579]
# 3) Матрица перехода, условие сходимости
S := identity(4) - τ*A  # матрица перехода
norm1(S) = 0.93775
# норма матрицы
norme(S) = 1.31592  # Евклидова норма
norm2(S) = 0.93775
# норма матрицы
normi(S) = 0.93775  # Равномерная норма
eigenvals(S) = [0.93775; 0.62075; 0.47975 - 0.0575i; 0.47975 + 0.0575i]  # вектор, содержащий собственные значения матрицы
|0.48 + 0.058i| = 0.483491
# 4) Погрешность приближенного значения от номера итерации
диапазон
r[i] := |y[i] - x|  # абсолютная погрешность
# [plot: r[i] vs i]
